# E8-B — LAMMPS 侧（MM 力端）：周期性固体 QM/MM 的 MM 部分（真周期）
#
# 区域划分与防双计数约定（与 TyxonQ driver 的 -o 参数一一对应）：
#   type 1 = O_qm（电荷 0，仅保留与 MM 的 LJ）
#   type 2 = H_qm（电荷 0，无 LJ）
#   type 3 = O_mm（TIP3P q=-0.834，有 LJ）
#   type 4 = H_mm（TIP3P q=+0.417，无 LJ）
# 总能量分工（严格无重叠，周期版）：
#   E = E_QM(QM 水，pbc Ewald 嵌入于 MM 点电荷及其周期镜像)  ← TyxonQ 返回
#     + E_MM(MM-MM 周期静电(pppm) + QM-MM vdW)               ← 本脚本返回
# 因此这里：
#   - boundary p p p，MM-MM 静电走 kspace_style pppm（tinfoil 边界，净电荷 0）；
#   - QM 原子电荷已置 0（见 water_dimer.lmp）→ kspace 与实空间都没有 QM-MM 库仑，
#     QM-MM 周期静电只由 TyxonQ 侧的 pyscf.qmmm.pbc Ewald 嵌入算一份（RB6）；
#   - pair_coeff * * 先全置 0，再只打开 O-O 通道 → 无 QM-QM LJ，QM-MM vdW 保留。
# 两个周期求和互补不重叠：pppm 只对 MM 电荷（QM 电荷为 0），
# PySCF Ewald 嵌入只算 QM-MM 交叉项（上游不含 MM-MM，docstring 明示）。

units           real
atom_style      charge
boundary        p p p

read_data       water_dimer.lmp

pair_style      lj/cut/coul/long 10.0 10.0
pair_coeff      * * 0.0 1.0 10.0
pair_coeff      1 3 0.1521 3.1507 10.0
pair_coeff      3 3 0.1521 3.1507 10.0

# MM-MM 周期静电：精度 1e-6（run.py 用解析 Ewald 和独立复核，见 README）
kspace_style    pppm 1e-6

timestep        0.5
thermo_style    custom step pe epair elong ke etotal
thermo          1

# 端口占位符由 run.py 替换；手动运行时自行填入与 i-PI input.xml 一致的端口。
fix             ipi all ipi 127.0.0.1 __PORT_LMP__
run             8
